*Heading
 /workspaces/codespaces-blank/a992_web_coupon_mesh.inp
*NODE
1, 10.90625, -2.5, 0
2, 10.90625, 0, 0
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******* E L E M E N T S *************
*ELEMENT, type=CPS3, ELSET=Surface1
1, 3186, 6506, 4536
2, 2569, 6633, 2567
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*ELSET,ELSET=PLATE
1, 2, 3, 4, 5, 6
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*NSET,NSET=PLATE
1, 2, 3, 4, 5, 6
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
**
** ----------------------------------------------------------------
** Added by make_a992_web_coupon.py
** Units: inch, kip, ksi
** This is a 2D plane-stress model of an A992 steel web plate.
** It predicts stress and PEEQ localization. It does not perform
** literal ductile fracture or automatic element deletion.
** ----------------------------------------------------------------
**
*ELSET, ELSET=EALL
1, 2, 3, 4, 5, 6
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*NSET, NSET=FIXED_EDGE
7, 9, 287, 288, 289, 290
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*NSET, NSET=LOADED_EDGE
8, 10, 309, 310, 311, 312
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**
*MATERIAL, NAME=A992_IDEALIZED
*ELASTIC
29000, 0.3
*PLASTIC
50, 0
55, 0.01
60, 0.05
65, 0.12
70, 0.18
**
*SOLID SECTION, ELSET=EALL, MATERIAL=A992_IDEALIZED
0.3
**
*STEP, NAME=TENSION, NLGEOM=YES, INC=300
*STATIC
0.005, 1.0, 1e-8, 0.025
**
** Left end fixed. Right end gripped and pulled in the x direction.
** U2 on loaded edge is restrained to mimic a flat grip and improve stability.
*BOUNDARY
FIXED_EDGE, 1, 1, 0.0
FIXED_EDGE, 2, 2, 0.0
FIXED_EDGE, 3, 3, 0.0
LOADED_EDGE, 1, 1, 0.6
LOADED_EDGE, 2, 2, 0.0
LOADED_EDGE, 3, 3, 0.0
**
*NODE FILE
U, RF
*EL FILE
S, E, PE, PEEQ
**
** Reaction output. The total x-reaction on LOADED_EDGE is the applied tensile force.
*NODE PRINT, NSET=LOADED_EDGE, TOTALS=YES
RF
*END STEP
