*Heading
 /workspaces/codespaces-blank/prepomax_bearing_tearout_demo/bearing_tearout_demo_mesh.inp
*NODE
1, 1.65625, 0, 0
2, 0, -2, 0
3, 8, -2, 0
4, 0, 2, 0
5, 8, 2, 0
6, 1.6547461335672, 0.034923199487088, 0
7, 1.6502456683696, 0.069587839823725, 0
8, 1.6427819242771, 0.10373727614095, 0
9, 1.6324101602396, 0.13711867796011, 0
10, 1.6192071651692, 0.16948490106125, 0
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******* E L E M E N T S *************
*ELEMENT, type=CPS3, ELSET=Surface1
1, 558, 2978, 2241
2, 1226, 2091, 1374
3, 1793, 2931, 2562
4, 1441, 2140, 1438
5, 694, 1935, 1889
6, 265, 2758, 1919
7, 87, 2772, 1945
8, 1919, 3015, 265
9, 2286, 2649, 1787
10, 2893, 3065, 1287
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*ELSET,ELSET=PLATE
1, 2, 3, 4, 5, 6, 7, 8, 9, 10,
11, 12, 13, 14, 15, 16, 17, 18, 19, 20,
21, 22, 23, 24, 25, 26, 27, 28, 29, 30,
31, 32, 33, 34, 35, 36, 37, 38, 39, 40,
41, 42, 43, 44, 45, 46, 47, 48, 49, 50,
51, 52, 53, 54, 55, 56, 57, 58, 59, 60,
61, 62, 63, 64, 65, 66, 67, 68, 69, 70,
71, 72, 73, 74, 75, 76, 77, 78, 79, 80,
81, 82, 83, 84, 85, 86, 87, 88, 89, 90,
91, 92, 93, 94, 95, 96, 97, 98, 99, 100,
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*NSET,NSET=PLATE
1, 2, 3, 4, 5, 6, 7, 8, 9, 10,
11, 12, 13, 14, 15, 16, 17, 18, 19, 20,
21, 22, 23, 24, 25, 26, 27, 28, 29, 30,
31, 32, 33, 34, 35, 36, 37, 38, 39, 40,
41, 42, 43, 44, 45, 46, 47, 48, 49, 50,
51, 52, 53, 54, 55, 56, 57, 58, 59, 60,
61, 62, 63, 64, 65, 66, 67, 68, 69, 70,
71, 72, 73, 74, 75, 76, 77, 78, 79, 80,
81, 82, 83, 84, 85, 86, 87, 88, 89, 90,
91, 92, 93, 94, 95, 96, 97, 98, 99, 100,
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
**
** ----------------------------------------------------------------
** Added by make_bearing_tearout_demo.py
** Units: inch, kip, ksi
**
** This is a 2D plane-stress bearing/tearout proxy model.
** The left arc of the bolt hole is displaced toward the free edge.
** It predicts stress and PEEQ localization. It does not perform
** literal ductile fracture or automatic element deletion.
** ----------------------------------------------------------------
**
*ELSET, ELSET=EALL
1, 2, 3, 4, 5, 6, 7, 8, 9, 10, 11, 12, 13, 14, 15, 16
17, 18, 19, 20, 21, 22, 23, 24, 25, 26, 27, 28, 29, 30, 31, 32
33, 34, 35, 36, 37, 38, 39, 40, 41, 42, 43, 44, 45, 46, 47, 48
49, 50, 51, 52, 53, 54, 55, 56, 57, 58, 59, 60, 61, 62, 63, 64
65, 66, 67, 68, 69, 70, 71, 72, 73, 74, 75, 76, 77, 78, 79, 80
81, 82, 83, 84, 85, 86, 87, 88, 89, 90, 91, 92, 93, 94, 95, 96
97, 98, 99, 100, 101, 102, 103, 104, 105, 106, 107, 108, 109, 110, 111, 112
113, 114, 115, 116, 117, 118, 119, 120, 121, 122, 123, 124, 125, 126, 127, 128
129, 130, 131, 132, 133, 134, 135, 136, 137, 138, 139, 140, 141, 142, 143, 144
145, 146, 147, 148, 149, 150, 151, 152, 153, 154, 155, 156, 157, 158, 159, 160
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*NSET, NSET=FIXED_RIGHT_EDGE
3, 5, 201, 202, 203, 204, 205, 206, 207, 208, 209, 210, 211, 212, 213, 214
215, 216, 217, 218
*NSET, NSET=HOLE_BOUNDARY
1, 6, 7, 8, 9, 10, 11, 12, 13, 14, 15, 16, 17, 18, 19, 20
21, 22, 23, 24, 25, 26, 27, 28, 29, 30, 31, 32, 33, 34, 35, 36
37, 38, 39, 40, 41, 42, 43, 44, 45, 46, 47, 48, 49, 50, 51, 52
53, 54, 55, 56, 57, 58, 59, 60, 61, 62, 63, 64, 65, 66, 67, 68
69, 70, 71, 72, 73, 74, 75, 76, 77, 2200, 3031, 3037
*NSET, NSET=BEARING_ARC
32, 33, 34, 35, 36, 37, 38, 39, 40, 41, 42, 43, 44, 45, 46, 47
48, 49, 50, 51
*NSET, NSET=TOP_TEAROUT_LIGAMENT
24, 25, 26, 27, 28, 29, 152, 153, 264, 291, 329, 343, 460, 461, 462, 463
464, 465, 742, 743, 744, 818, 819, 820, 828, 914, 1059, 1060, 1205, 1206, 1207, 1208
1209, 1210, 1218, 1223, 1224, 1231, 1516, 1517, 1679, 1715, 1791, 1801, 1821, 1827, 1833, 1959
2103, 2104, 2110, 2112, 2113, 2114, 2115, 2138, 2144, 2162, 2163, 2232, 2238, 2404, 2405, 2406
2407, 2408, 2409, 2438, 2446, 2545, 2558, 2622, 2699, 2767, 2768, 2821, 2863, 2883, 2915, 3012
3044, 3077, 3127, 3147, 3188, 3202, 3230, 3234, 3236, 3281, 3283, 3284, 3321, 3387
*NSET, NSET=BOTTOM_TEAROUT_LIGAMENT
54, 55, 56, 57, 58, 59, 169, 170, 263, 288, 331, 344, 417, 418, 419, 421
767, 816, 832, 833, 835, 841, 842, 900, 961, 962, 1049, 1057, 1058, 1119, 1274, 1327
1434, 1436, 1488, 1490, 1607, 1634, 1635, 1637, 1730, 1731, 1732, 1733, 1766, 1861, 1891, 1902
1960, 2042, 2111, 2129, 2131, 2132, 2136, 2197, 2198, 2217, 2284, 2341, 2344, 2363, 2364, 2410
2434, 2517, 2690, 2718, 2781, 2988, 3026, 3034, 3110, 3170, 3233, 3248, 3334, 3336, 3360, 3376
3410
**
*MATERIAL, NAME=A992_IDEALIZED
*ELASTIC
29000, 0.3
*PLASTIC
50, 0
55, 0.01
60, 0.05
65, 0.12
70, 0.18
**
*SOLID SECTION, ELSET=EALL, MATERIAL=A992_IDEALIZED
0.375
**
*STEP, NAME=BEARING_TEAROUT, NLGEOM=YES, INC=300
*STATIC
0.005, 1.0, 1e-8, 0.025
**
** Right side is the connected/gross-section side.
** The bearing arc on the hole is pushed toward the free edge.
**
** Fixed edge:
*BOUNDARY
FIXED_RIGHT_EDGE, 1, 1, 0.0
FIXED_RIGHT_EDGE, 2, 2, 0.0
FIXED_RIGHT_EDGE, 3, 3, 0.0
**
** Bearing proxy. U1 only is prescribed so the arc can still deform in U2.
** Negative U1 means the bolt pushes/pulls toward the left free edge.
*BOUNDARY
BEARING_ARC, 1, 1, -0.18
BEARING_ARC, 3, 3, 0.0
**
*NODE FILE
U, RF
*EL FILE
S, E, PE, PEEQ
**
** Reaction output. The total x-reaction on BEARING_ARC estimates bolt load.
*NODE PRINT, NSET=BEARING_ARC, TOTALS=YES
RF
*NODE PRINT, NSET=FIXED_RIGHT_EDGE, TOTALS=YES
RF
*END STEP
