**
** W-section lateral-torsional buckling demo
** Generated by make_ltb_wsection_demo.py
** Units: inch, kip, ksi
** This is an imperfect nonlinear static shell model, not a code design check.
**
** Length = 240 in
** Depth = 18 in
** Flange width = 6.5 in
** Flange thickness = 0.5 in
** Web thickness = 0.3 in
** Twist imperfection amplitude = 0.02 rad
** Lateral imperfection amplitude = 0.1 in
**
*NODE
1, 0.00000000, -3.25000000, 8.75000000
2, 0.00000000, -2.70833333, 8.75000000
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*ELEMENT, TYPE=S4, ELSET=TOP_FLANGE
1, 1, 14, 15, 2
2, 2, 15, 16, 3
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*ELEMENT, TYPE=S4, ELSET=BOTTOM_FLANGE
961, 1054, 1055, 1068, 1067
962, 1055, 1056, 1069, 1068
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*ELEMENT, TYPE=S4, ELSET=WEB
1921, 1060, 1073, 2122, 2107
1922, 2107, 2122, 2123, 2108
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*ELSET, ELSET=FLANGES
1, 2, 3, 4, 5, 6
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*ELSET, ELSET=EALL
1, 2, 3, 4, 5, 6
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*NSET, NSET=LEFT_SUPPORT
1, 2, 3, 4, 5, 6
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*NSET, NSET=RIGHT_SUPPORT
1041, 1042, 1043, 1044, 1045, 1046
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*NSET, NSET=LEFT_WEB_MID_ANCHOR
2114
*NSET, NSET=MIDSPAN_TOP_LOAD_LINE
521, 522, 523, 524, 525, 526, 527, 528, 529, 530, 531, 532, 533
*NSET, NSET=MIDSPAN_WEB_MID
2714
**
*MATERIAL, NAME=A992_IDEALIZED
*ELASTIC
29000, 0.3
*PLASTIC
50, 0
55, 0.01
60, 0.05
65, 0.12
70, 0.18
**
*SHELL SECTION, ELSET=TOP_FLANGE, MATERIAL=A992_IDEALIZED
0.5
*SHELL SECTION, ELSET=BOTTOM_FLANGE, MATERIAL=A992_IDEALIZED
0.5
*SHELL SECTION, ELSET=WEB, MATERIAL=A992_IDEALIZED
0.3
**
*STEP, NAME=LTB_BENDING, NLGEOM=YES, INC=300
*STATIC
0.005, 1.0, 1e-8, 0.020
** End-braced simply-supported style constraints.
** U2 = lateral displacement, U3 = vertical displacement.
*BOUNDARY
LEFT_SUPPORT, 2, 2, 0.0
RIGHT_SUPPORT, 2, 2, 0.0
LEFT_SUPPORT, 3, 3, 0.0
RIGHT_SUPPORT, 3, 3, 0.0
LEFT_WEB_MID_ANCHOR, 1, 1, 0.0
** Displacement-controlled flexural loading at top flange midspan.
*BOUNDARY
MIDSPAN_TOP_LOAD_LINE, 3, 3, -4
**
*NODE FILE
U, RF
*EL FILE
S, E, PE, PEEQ
**
*NODE PRINT, NSET=MIDSPAN_TOP_LOAD_LINE, TOTALS=YES
RF
*NODE PRINT, NSET=LEFT_SUPPORT, TOTALS=YES
RF
*NODE PRINT, NSET=RIGHT_SUPPORT, TOTALS=YES
RF
*END STEP
